<?xml version="1.0" encoding="UTF-8"?>
<channelml xmlns="http://morphml.org/channelml/schema"
    xmlns:xsi="http://www.w3.org/2001/XMLSchema-instance"
    xmlns:meta="http://morphml.org/metadata/schema"
    xsi:schemaLocation="http://morphml.org/channelml/schema  ../../Schemata/v1.1/Level2/ChannelML_v1.1.xsd"
    units="SI Units">

    <meta:notes>A channel from Maex, R and De Schutter, E. Synchronization of Golgi and Granule Cell Firing in a
    Detailed Network Model of the Cerebellar Granule Cell Layer. J Neurophysiol, Nov 1998; 80: 2521 - 2537.
    Note, the values used here are based on the GENESIS scripts accompanying the paper</meta:notes>

    <ion name="k" default_erev="-0.09" charge="1"/>

    <channel_type name="Golgi_KDr_CML" density="yes">

        <meta:notes>Delayed rectifyer K channel</meta:notes>

        <meta:publication>
          <meta:fullTitle>Maex, R and De Schutter, E.
            Synchronization of Golgi and Granule Cell Firing in a Detailed Network Model of the
            cerebellar Granule Cell Layer. J Neurophysiol, Nov 1998; 80: 2521 - 2537</meta:fullTitle>
          <meta:pubmedRef>http://www.ncbi.nlm.nih.gov/entrez/query.fcgi?cmd=Retrieve&amp;db=PubMed&amp;list_uids=9819260&amp;dopt=Abstract</meta:pubmedRef>
        </meta:publication>

        <current_voltage_relation>
            <ohmic ion="k">
              <conductance default_gmax="67.8839">
                    <rate_adjustments>
                        <q10_settings q10_factor="3" experimental_temp="17.350264793"/>
                    </rate_adjustments>
                    <gate power="4">
                        <state name="m" fraction="1"/>
                    </gate>
                    <gate power="1">
                        <state name="h" fraction="1"/>
                    </gate>
                </conductance>
            </ohmic>
        </current_voltage_relation>

        <hh_gate state="m">
	<transition>
		<voltage_gate>
			<alpha>
				<generic_equation_hh expr="170 * ((exp (73 *(v - (-0.038)))))"/>
			</alpha>
			<beta>
				<generic_equation_hh expr="170 * ((exp ((-18) *(v - (-0.038)))))"/>
			</beta>
		</voltage_gate>
				</transition>
			</hh_gate>

        <hh_gate state="h">
		<transition>
			<voltage_gate>
				<alpha>
					<generic_equation_hh expr="v > -0.046 ? 0.76 : 0.7 + 0.065*(exp (-80*(v - (-0.046))))"/>
				</alpha>
				<beta>
					<generic_equation_hh expr="1.1/(1 + (exp (-80.7 * (v - (-0.044)))))"/>
				</beta>
			</voltage_gate>
                            </transition>
	</hh_gate>

	<impl_prefs>
		<table_settings max_v="0.05" min_v="-0.1" table_divisions="299"/>
        </impl_prefs>

    </channel_type>
</channelml>
