<?xml version="1.0" encoding="UTF-8"?>
<channelml xmlns="http://morphml.org/channelml/schema" xmlns:xsi="http://www.w3.org/2001/XMLSchema-instance" xmlns:meta="http://morphml.org/metadata/schema" xsi:schemaLocation="http://morphml.org/channelml/schema  ../../../../templates/xmlTemplates/Schemata/v1.1/Level2/ChannelML_v1.1.xsd" units="SI Units">

    <meta:notes>A channel from Maex, R and De Schutter, E. Synchronization of Golgi and Granule Cell Firing in a
    Detailed Network Model of the Cerebellar Granule Cell Layer</meta:notes>

    <ion name="ca" charge="2" default_erev="0.080"/>

    <channel_type name="Golgi_CaHVA_CML" density="yes">

        <meta:notes>High voltage Activated Ca channel</meta:notes>

	<meta:publication>
            <meta:fullTitle>Maex, R and De Schutter, E.
                    Synchronization of Golgi and Granule Cell Firing in a Detailed Network Model of the
                    cerebellar Granule Cell Layer. J Neurophysiol, Nov 1998; 80: 2521 - 2537</meta:fullTitle>
            <meta:pubmedRef>http://www.ncbi.nlm.nih.gov/entrez/query.fcgi?cmd=Retrieve&amp;db=PubMed&amp;list_uids=9819260&amp;dopt=Abstract</meta:pubmedRef>
        </meta:publication>

	<meta:neuronDBref>
            <meta:modelName>Calcium channels</meta:modelName>
            <meta:uri>http://senselab.med.yale.edu/senselab/NeuronDB/channelGene2.htm#table1</meta:uri>
        </meta:neuronDBref>

        <current_voltage_relation>
            <ohmic ion="ca">
		<conductance default_gmax="8.31757">
                    <rate_adjustments>
                        <q10_settings q10_factor="3" experimental_temp="17.350264793"/>
                    </rate_adjustments>

                    <gate power="2">
                      <state name="m" fraction="1"/>
                    </gate>
                    <gate power="1">
                      <state name="h" fraction="1"/>
                    </gate>

                </conductance>
            </ohmic>
        </current_voltage_relation>

        <hh_gate state="m">
            <transition>
              <voltage_gate>
                <alpha>
                  <parameterised_hh type="sigmoid" expr="A/(1 + exp(-k*(d-v)))">
                    <parameter name="A" value="1600"/>
                    <parameter name="k" value="-72"/>
                    <parameter name="d" value="0.005"/>
                  </parameterised_hh>
                </alpha>
                <beta>
                  <parameterised_hh type="linoid" expr="A*(k*v-d)/(1 - exp(-(k*v-d)))">
                    <parameter name="A" value="100"/>
                    <parameter name="k" value="-200"/>
                    <parameter name="d" value="0.0089">
                      <meta:notes>This is -0.0089 in the granule cell version of the channel</meta:notes>
                    </parameter>
                  </parameterised_hh>
                </beta>
              </voltage_gate>
            </transition>
          </hh_gate>

          <hh_gate state="h">
              <transition>
                <voltage_gate>
                  <alpha>
                    <generic_equation_hh expr="v &lt; -0.060 ? 5.0 : 5 * (exp (-50 * (v - (-0.060))))"/>
                  </alpha>
                  <beta>
                    <generic_equation_hh expr="v &lt; -0.060 ? 0 : 5 - (5 * (exp (-50 * (v - (-0.060)))))"/>
                  </beta>
                </voltage_gate>
            </transition>
        </hh_gate>

        <impl_prefs>
          <comment>Setting these table divs for direct comparison with original GENESIS scripts</comment>
          <table_settings max_v="0.05" min_v="-0.1" table_divisions="299"/>
        </impl_prefs>

    </channel_type>
</channelml>
