<?xml version="1.0" encoding="UTF-8"?>
<channelml xmlns="http://morphml.org/channelml/schema"
           xmlns:xsi="http://www.w3.org/2001/XMLSchema-instance"
           xmlns:meta="http://morphml.org/metadata/schema"
           xsi:schemaLocation="http://morphml.org/channelml/schema   ../../../../templates/xmlTemplates/Schemata/v1.1/Level2/ChannelML_v1.1.xsd"
           units="SI Units">

    <meta:notes>A channel from Maex, R and De Schutter, E.
    Synchronization of Golgi and Granule Cell Firing in a Detailed Network Model of the Cerebellar Granule Cell Layer
    J Neurophysiol, Nov 1998; 80: 2521 - 2537.</meta:notes>

    <ion name="h" default_erev="-0.042" charge="1"/>

    <channel_type name="Golgi_H_CML" density="yes">

      <meta:notes>Anomalous inward rectifying H conductance</meta:notes>

      <meta:publication>
        <meta:fullTitle>Maex, R and De Schutter, E.
          Synchronization of Golgi and Granule Cell Firing in a Detailed Network Model of the
          cerebellar Granule Cell Layer. J Neurophysiol, Nov 1998; 80: 2521 - 2537</meta:fullTitle>
        <meta:pubmedRef>http://www.ncbi.nlm.nih.gov/entrez/query.fcgi?cmd=Retrieve&amp;db=PubMed&amp;list_uids=9819260&amp;dopt=Abstract</meta:pubmedRef>
      </meta:publication>

        <current_voltage_relation>
            <ohmic ion="h">
              <conductance default_gmax="1.71496">
                    <rate_adjustments>
                        <q10_settings q10_factor="3" experimental_temp="17.350264793"/>
                    </rate_adjustments>
                    <gate power="1">
                      <state name="n" fraction="1"/>
                    </gate>
                </conductance>
            </ohmic>
        </current_voltage_relation>

        <hh_gate state="n">
          <transition>
            <voltage_gate>
              <alpha>
                <parameterised_hh type="exponential" expr="A*exp(k*(v-d))">
                  <parameter name="A" value="0.8"/>
                  <parameter name="k" value="-90.9"/>
                  <parameter name="d" value="-0.075"/>
                </parameterised_hh>
              </alpha>
              <beta>
                <parameterised_hh type="exponential" expr="A*exp(k*(v-d))">
                  <parameter name="A" value="0.8"/>
                  <parameter name="k" value="90.9"/>
                  <parameter name="d" value="-0.075"/>
                </parameterised_hh>
              </beta>
            </voltage_gate>
          </transition>
        </hh_gate>

        <impl_prefs>
          <comment>Setting these table divs for direct comparison with original GENESIS scripts</comment>
          <table_settings max_v="0.05" min_v="-0.1" table_divisions="299"/>
        </impl_prefs>

    </channel_type>
</channelml>
