<?xml version="1.0" encoding="UTF-8"?>
<!--

   $Revision: 151 $
   $LastChangedBy: pgleeson $
   $Date: 2008-10-07 14:13:37 +0100 (Tue, 07 Oct 2008) $
   $HeadURL: https://neuroml.svn.sourceforge.net/svnroot/neuroml/tempModels/neuroConstruct/Ex7_GranuleCell/cellMechanisms/GranPassiveCond/LeakConductance.xml $

-->

<channelml xmlns="http://morphml.org/channelml/schema"
   xmlns:xsi="http://www.w3.org/2001/XMLSchema-instance"
   xmlns:meta="http://morphml.org/metadata/schema"
   xsi:schemaLocation="http://morphml.org/channelml/schema  ../../../../../trunk/web/NeuroMLFiles/Schemata/v1.7.3/Level2/ChannelML_v1.7.3.xsd"
   units="Physiological Units">

    <meta:notes>ChannelML file containing a single Channel description</meta:notes>

    <channel_type name="GranPassiveCond">

        <status value="stable">
            <meta:contributor>
                <meta:name>Padraig Gleeson</meta:name>
            </meta:contributor>
        </status>

        <meta:notes>Simple leak conductance for Granule cell</meta:notes>

        <meta:publication>
            <meta:fullTitle>Maex, R and De Schutter, E.
            Synchronization of Golgi and Granule Cell Firing in a Detailed Network Model of the
            cerebellar Granule Cell Layer. J Neurophysiol, Nov 1998; 80: 2521 - 2537</meta:fullTitle>
            <meta:pubmedRef>http://www.ncbi.nlm.nih.gov/entrez/query.fcgi?cmd=Retrieve&amp;db=PubMed&amp;list_uids=9819260&amp;dopt=Abstract</meta:pubmedRef>
        </meta:publication>

        <current_voltage_relation cond_law="ohmic" ion="non_specific" default_gmax="3.30033e-2" default_erev="-65"/>    <!-- gmax units: mS/cm2-->

    </channel_type>

</channelml>
